integral(exp(x)*cos(x)^2, x = 0 .. π) = 13.2844
solve block
    # guess values
    a := 0.861
    # constraints
    integral(x^0.3*(ln(1.1*x) + x), x = 0.1 .. a) == 0
    # solver
    find(a) = 0.972776
end solve block
